// SPDX-FileCopyrightText: Copyright (c) OpenGeoSys Community (opengeosys.org)
// SPDX-License-Identifier: BSD-3-Clause

@Behaviour<generic> 'libOgsMFrontBehaviour' 'BDT';
@MaterialProperty<constant> 'YoungModulus' 4.4619E+04;
@MaterialProperty<constant> 'PoissonRatio' 3.0000E-01;
@MaterialProperty<constant> 'ThermalExpansion' 1.0000E-05;
@MaterialProperty<constant> 'f_c' 8.0750E+02;
@MaterialProperty<constant> 'm_0' 4.3100E+00;
@MaterialProperty<constant> 'alpha_p' 1.4200E-03;
@MaterialProperty<constant> 'n_exp_T' 4.7200E+00;
@MaterialProperty<constant> 'q_h0' 8.5900E-01;
@MaterialProperty<constant> 'chi_h' 0.0010;
@MaterialProperty<constant> 'alpha_d' 2.0000E-02;
@MaterialProperty<constant> 'h_d' 1.0000E+00;
@MaterialProperty<constant> 'Qact' 5.5400E+05;
@MaterialProperty<constant> 'A_creep' 5.3600E+10;
@MaterialProperty<constant> 'n_creep' 6.8000E+00;
@MaterialProperty<constant> 'El_1' -2.1693E-06;
@MaterialProperty<constant> 'El_2' 1.5710E-03;
@MaterialProperty<constant> 'El_3' 6.8680E-01;
@MaterialProperty<constant> 'at_1' 1.1522E-04;
@MaterialProperty<constant> 'at_2' -9.4003E-05;
@MaterialProperty<constant> 'at_3' -8.1075E-02;

// @Parameter 'Tref' 293.15;

@ExternalStateVariable 'Temperature' 1173.15;

@ImposedStrain 'EYY' {
 0. : 0.,
 750 : -0.0075,
 6.1500E+03 : -6.1500E-02,
 6.5260E+03 : -8.0300E-02,
 6.7740E+03 : -1.0510E-01
};

@ImposedStress 'SXX' {0. : 0., 750 : -300, 6.7740E+03 : -300};

@ImposedStress 'SZZ' {0. : 0., 750 : -300, 6.7740E+03 : -300};

// @Times{0., 6.7740E+03 in 1000};
@Times{0., 6.0E+03 in 1000};
