// SPDX-FileCopyrightText: Copyright (c) OpenGeoSys Community (opengeosys.org)
// SPDX-License-Identifier: BSD-3-Clause

@Behaviour<generic> 'lib/libOgsMFrontBehaviour' 'MohrCoulombAbboSloan';
@ExternalStateVariable 'Temperature' {0 : 293.15, 3600. : 800};
//@ImposedStrain<function> 'EXX' '-1.e-12*t';
//@ImposedStrain<function> 'EYY' '-1.e-12*t';
//@ImposedStress<function> 'SXX' '1.e-12*t';
//@ImposedStress<function> 'SYY' '1.e-12*t';
@ImposedStrain<function> 'EZZ' '1.e-3*t';
//@ImposedStrain<function> 'EXY' '1.e-3*t';
@Times{0., 1 in 40};

@MaterialProperty<constant> 'YoungModulus' 150.e3;
@MaterialProperty<constant> 'PoissonRatio' 0.3;
@MaterialProperty<constant> 'Cohesion' 3.e1;
@MaterialProperty<constant> 'FrictionAngle' 30.;
@MaterialProperty<constant> 'DilatancyAngle' 10.;
@MaterialProperty<constant> 'TransitionAngle' 29.;
@MaterialProperty<constant> 'TensionCutOffParameter' 1.e1;
