// SPDX-FileCopyrightText: Copyright (c) OpenGeoSys Community (opengeosys.org)
// SPDX-License-Identifier: BSD-3-Clause

// vim: ft=cpp sw=2 ts=2 sts=2 et

@DSL DefaultGenericBehaviour;
@Behaviour CheckStiffnessMatrixMissingBlocks;
@Author Christoph Lehmann;
@Date 01 / 08 / 2022;
@Description {
  Check passing the stiffness matrix between OGS and MFront.
  In this behaviour some tangent operator blocks are missing.
}

@Gradient StrainStensor eps_total;
eps_total.setGlossaryName("Strain");

@Gradient real p_LR;
p_LR.setEntryName("LiquidPressure");

@Flux StressStensor sigma;
sigma.setGlossaryName("Stress");

@Flux real S_L;
S_L.setEntryName("Saturation");

@TangentOperatorBlocks{dsigma_ddp_LR, dS_L_ddeps_total};

@ProvidesTangentOperator;
@Integrator {
  // TODO restrict to 3D!

  sigma(0) = 2301;
  sigma(1) = 2302;
  sigma(2) = 2303;
  sigma(3) = 2304;
  sigma(5) = 2305;
  sigma(4) = 2306;
  S_L = 2307;

  if (computeTangentOperator_)
  {
    dsigma_ddp_LR(0) = 2001;
    dsigma_ddp_LR(1) = 2002;
    dsigma_ddp_LR(2) = 2003;
    dsigma_ddp_LR(3) = 2004;
    dsigma_ddp_LR(5) = 2005;
    dsigma_ddp_LR(4) = 2006;

    dS_L_ddeps_total(0) = 3001;
    dS_L_ddeps_total(1) = 3002;
    dS_L_ddeps_total(2) = 3003;
    dS_L_ddeps_total(3) = 3004;
    dS_L_ddeps_total(5) = 3005;
    dS_L_ddeps_total(4) = 3006;
  }
}
